# № 1
# Прямая AB
# a2 = b = 2, k = (b2 - a2) / (b1 - a1) = (4 - 2) / (6 - 0) = 1/3
a1 := 0
b1 := 6
c1 := 8
a2 := 2
b2 := 4
c2 := 0
y1(x) := 1/3*x + 2
AB := sqrt((b1 - a1)^2 + (b2 - a2)^2)
# Прямая BC
# b = 16, k = (b2 - c2) / (b1 - c1) = (4 - 0) / (6 - 8) = -2
AC := sqrt((c1 - a1)^2 + (c2 - a2)^2)
y2(x) := -2*x + 16
BC := sqrt((c1 - b1)^2 + (c2 - b2)^2)
# Прямая AC
# a2 = b = 2, k = (a2 - c2) / (a1 - c1) = (2 - 0) / (0 - 8) = -1/4
AB = 6.32456
AC = 8.24621
y3(x) := -1/4*x + 2
BC = 4.47214
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p := (AB + BC + AC)/2
p = 9.52145
S := sqrt(p*(p - AB)*(p - BC)*(p - AC))
S = 14
# № 2
# Пусть точка M лежит на середине BC
Mx := (b1 + c1)/2
# Прямая AM
# b = 2, k = 0
My := (b2 + c2)/2
y4(x) := 0*x + 2
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k0 := 0
# А так как прямая AM совпадает с функцией f(x)=k*x+b,
# составляем систему уравнений. Надо найти k и b
b0 := 0
Given
k0*a1 + b0 == a2
k0*Mx + b0 == My
k := 0
b := 2
Find(k0, b0) = [0; 2]
№3
S = 14
S_1 := 0
S_2 := 0
Given
S_1 + S_2 == S
S_2 == 2*S_1
Y(F) := integral(y1(x) - y3(x), x = root(y1(p) - y3(p), p) .. root(y3(p) - p^2 - F, p)) + integral(y1(x) - x^2 - F, x = root(y3(p) - p^2 - F, p) .. root(y1(p) - p^2 - F, p))
Find(S_1, S_2) = [4.66667; 9.33333]
# Приближенное значение
f1 := -13.819
Уравнение
Given
Y(f1) == 14/3
# Прямая AB
# a2 = b = 2, k = (b2 - a2) / (b1 - a1) = (4 - 2) / (6 - 0) = 1/3
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# Найденный коэффициент
Find(f1) = -13.8191
y1(x) := 1/3*x + 2
# Нашёл F => 2 решения, при a = 1
# Приближенное значение
f2 := -29.75
# Прямая BC
# b = 16, k = (b2 - c2) / (b1 - c1) = (4 - 0) / (6 - 8) = -2
Уравнение
Given
Y(f2) == 14*2/3
# Найденный коэффициент
Find(f2) = -29.7501
y2(x) := -2*x + 16
# Прямая AC
# a2 = b = 2, k = (a2 - c2) / (a1 - c1) = (2 - 0) / (0 - 8) = -1/4
Y1(F, a) := integral(y1(x) - y3(x), x = root(y1(p) - y3(p), p) .. root(y3(p) - a*p^2 - F, p)) + integral(y1(x) - a*x^2 - F, x = root(y3(p) - a*p^2 - F, p) .. root(y1(p) - a*p^2 - F, p))
y3(x) := -1/4*x + 2
# Приближенное значение
f3 := -1
a11 := 1
Уравнение
Given
Y1(f3, a11) == 14/3
# Найденный коэффициент
Find(f3, a11) = [-3.18122; 0.336894]
