1
L := 14
N1 := 7
m := 0 .. N1
fk(x) := 0.7*x + rnd(11) - 5
XN[m] := ((L*m) - N1*2)/N1
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YN[m] := fk(XN[m])
2
fI(x) := interp(pspline(XN, YN), XN, YN, x)
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3
L2 := 14
N2 := 20
n := 0 .. N2
XK[n] := (L2*n - N2*2)/N2
YK[n] := fI(XK[n])
r(x) := interp(pspline(XK, YK), XK, YK, x)
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4.
d := regress(XK, YK, 7)
4.1
dd(x) := interp(d, XK, YK, x)
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δ := integral((dd(x) - r(x))^2, x = -2 .. 12)/integral(dd(x)^2, x = -2 .. 12)
δ*100 = 0.895311
4.2
FF(x, a, b, c) := a*exp(b*x)*sin(c*x)
FF1(x1, a1, b1, c1) := exp(a1 + b1*x1 + c1*x1^2)
FFF1(x2, a2, b2, c2) := sin(a2*b2 + c2/x2)
vs1 := [1; 0; -1]
F1(x, a, b, c) := [FF(x, a, b, c); d/da(FF(x, a, b, c)); d/db(FF(x, a, b, c)); d/dc(FF(x, a, b, c))]
F2(x1, a1, b1, c1) := [
    FF1(x1, a1, b1, c1);
    d/da1(FF1(x1, a1, b1, c1));
    d/db1(FF1(x1, a1, b1, c1));
    d/dc1(FF1(x1, a1, b1, c1))
]
vs2 := [1; 0; 0]
F3(x2, a2, b2, c2) := [
    FFF1(x2, a2, b2, c2);
    d/da2(FFF1(x2, a2, b2, c2));
    d/db2(FFF1(x2, a2, b2, c2));
    d/dc2(FFF1(x2, a2, b2, c2))
]
vs3 := [1; 0; -1]
cs1 := genfit(XK, YK, vs1, F1)
cs2 := genfit(XK, YK, vs2, FF1)
cs3 := genfit(XK, YK, vs3, FFF1)
y1(x) := cs1[0]*exp(cs1[1]*x)*sin(cs1[2]*x)
y2(x1) := exp(cs2[0] + cs2[1]*x1 + cs2[2]*x1^2)
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y3(x2) := sin(cs3[0]*cs3[1] + cs3[2]/x2)
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δ1 := integral((y1(x) - r(x))^2, x = -2 .. 12)/integral(y1(x)^2, x = -2 .. 12)
δ2 := integral((y2(x) - r(x))^2, x = -2 .. 12)/integral(y2(x)^2, x = -2 .. 12)
δ3 := integral((y3(x) - r(x))^2, x = -2 .. 12)/integral(y3(x)^2, x = -2 .. 12)
δ1*100 = 4.57195
δ2*100 = 11.4653
δ3*100 = 5439.7
