L := 2
f(x) := sin(x^2)^2 - cos(x^2 + 4)^4
a :=
    for k ∈ 1 .. FRAME
        a[k] ← 2/L*integral(f(x)*cos(2*k*π/L*x), x = -L/2 .. L/2)
    return a
b :=
    for k ∈ 1 .. FRAME
        b[k] ← 2/L*integral(f(x)*sin(2*k*π/L*x), x = -L/2 .. L/2)
    return b
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a[0] := 2/L*integral(f(x), x = -L/2 .. L/2)
f_approx(x) := a[0]/2 + sum(a[k]*cos(2*k*π/L*x) + b[k]*sin(2*k*π/L*x), k = 1 .. FRAME)
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FRAME := 10
δ := integral((f(x) - f_approx(x))^2, x = -L/2 .. L/2)
δ = 0.0926081
