1
L := 10
f1(x) := sin(x) + 1
f2(x) := cos(2*x)
f3(x) := sin(5*x) - 5
f4(x) := sin(x) - 6
f5(x) := cos(x) + sin(x)
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2
N1 := integral(f1(x)*f1(x), x = 0 .. L)
N2 := integral(f2(x)*f2(x), x = 0 .. L)
N3 := integral(f3(x)*f3(x), x = 0 .. L)
N4 := integral(f4(x)*f4(x), x = 0 .. L)
N5 := integral(f5(x)*f5(x), x = 0 .. L)
N1 := sqrt(N1)
N2 := sqrt(N2)
N3 := sqrt(N3)
N4 := sqrt(N4)
N5 := sqrt(N5)
f1n(x) := f1(x)/N1
f2n(x) := f2(x)/N2
f3n(x) := f3(x)/N3
f4n(x) := f4(x)/N4
f5n(x) := f5(x)/N5
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3
3.1
v1(x) := f1n(x)
a := integral(v1(x)*f2n(x), x = 0 .. L)
N11 := integral(v1(x)*v1(x), x = 0 .. L)
v2(x) := f2n(x) - v1(x)*a
N11 := sqrt(N11)
3.2
N10 := integral(v2(x)*v2(x), x = 0 .. L)
v1n(x) := v1(x)/N11
N10 := sqrt(N10)
v2n(x) := v2(x)/N10
b := integral(v1(x)*f3n(x), x = 0 .. L)
b1 := integral(v2n(x)*f3n(x), x = 0 .. L)
3.3
v3(x) := f3n(x) - (b*v1(x) + b1*v2n(x))
N30 := integral(v3(x)*v3(x), x = 0 .. L)
N30 := sqrt(N30)
c := integral(v1(x)*f4n(x), x = 0 .. L)
v3n(x) := v3(x)/N30
c1 := integral(v2n(x)*f4n(x), x = 0 .. L)
c2 := integral(v3n(x)*f4n(x), x = 0 .. L)
v4(x) := f4n(x) - (c*v1(x) + c1*v2n(x) + c2*v3n(x))
N40 := integral(v4(x)*v4(x), x = 0 .. L)
N40 := sqrt(N40)
v4n(x) := v4(x)/N40
d2 := integral(v3n(x)*f5n(x), x = 0 .. L)
d3 := integral(v4n(x)*f5n(x), x = 0 .. L)
d := integral(v1(x)*f5n(x), x = 0 .. L)
d1 := integral(v2n(x)*f5n(x), x = 0 .. L)
v5(x) := f5n(x) - (d*v1(x) + d1*v2n(x) + d2*v3n(x) + d3*v4n(x))
N50 := integral(v5(x)*v5(x), x = 0 .. L)
N50 := sqrt(N50)
v5n(x) := v5(x)/N50
integral(v3n(x)*v2n(x), x = 0 .. L) = 6.245e-17
integral(v1n(x)*v2n(x), x = 0 .. L) = 3.46945e-17
integral(v4n(x)*v3n(x), x = 0 .. L) = -7.358e-14
integral(v5n(x)*v2n(x), x = 0 .. L) = -6.93889e-17
integral(v5n(x)*v4n(x), x = 0 .. L) = 2.21559e-14
integral(v5n(x)*v3n(x), x = 0 .. L) = 3.60822e-16
4
f(x) := 10*x^0.4*cos(2*x)*ln(2*x + 1) + 25*exp(-0.1*x)
h1 := integral(v1(x)*f(x), x = 0 .. L)
h2 := integral(v2n(x)*f(x), x = 0 .. L)
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h3 := integral(v3n(x)*f(x), x = 0 .. L)
h4 := integral(v4n(x)*f(x), x = 0 .. L)
h5 := integral(v5n(x)*f(x), x = 0 .. L)
апроксимация
fn(x) := h1*v1(x) + h2*v2n(x) + h3*v3n(x) + h4*v4n(x) + h5*v5n(x)
h3 = -25.6208
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