d := 0.75
M := 15
k := 2*π
F(x, y) := 1*if(x == 0, M*sin(0.5*M*k*d*y)/sin(0.5*k*d*y), if(y == 0, M*sin(0.5*M*k*d*x)/sin(0.5*k*d*y), sin(0.5*M*k*d*x)/sin(0.5*k*d*y)*sin(0.5*M*k*d*y)/sin(0.5*k*d*y)))
f(x, y) := if(x == 0 and y == 0, M^2, F(x, y))
J[n] := 1  # error: This variable is undefined.
f1(x, y) := sum(1*exp(-1i*k*d*n*(sin(x) - sin(y))), n = -M .. M)
