t0 := 1
A := 4
t2 := -17
T := 3.5
p := 0.05
u0(x) :=
    A/T*x - t0 if t0 ≤ x < t0 + T
    A*x/(-2*T) + A*(t0 + 3*T)/(2*T) if t0 + T ≤ x < t0 + 3*T
    (0*x) if x < t0
    (0*x) if x > t0 + 3*T
u2(x) := A*e^(-p*(x - t2)^2)
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N := 100
n := 0 .. N
X[n] := 10*T*n/N
Y := rnorm(N + 1, 0, 1)
u := pspline(X, Y)
Un(t) := interp(u, X, Y, t)
Us(t) := u0(t) + Un(t)
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sp(ω) := (1/sqrt(2*π))*integral(u0(x)*e^(-1i*ω*x), x = 0 .. 10*T)
s(ω) := |sp(ω)|
F := □  # error: This placeholder is empty.
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φ(ω) := atan(Im(sp(ω))/Re(sp(ω)))
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# корреляционная функция
1
K1(t) := integral(u0(x)*u0(x - t), x = t0 + T .. t0 + 3*T)
K(t) := integral(u0(x)*u0(x - t), x = -30 .. 15)
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2
KV(t) := integral(u2(x)*u0(x - t), x = -30 .. 15)
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3
us(t) := u2(t) + u0(t)
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4
KVS(t) := integral(us(x)*u0(x - t), x = 0 .. 15*T)
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5
δ1 := □  # error: This placeholder is empty.
