g(x) := sin(x^2)^2 + cos(x^3)
L := 4
N := 5
n :=
    for k ∈ 0 .. N
        n[k] ← L/N*k
    return n
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y := g(n)
n = [0; 0.8; 1.6; 2.4; 3.2; 4]
y = [1; 1.22841; -0.276301; 0.557715; 0.746789; 0.474746]
c := pspline(n, y)
c1 := cspline(n, y)
c = [0; 3; 1; -4.7503; -4.7503; 7.50352; -3.33823; -0.196951; -0.196951]
c1 = [0; 3; 2; -12.34; -2.708; 6.924; -3.06246; -0.720497; 1.62147]
fit(x) := interp(c, n, y, x)
fit1(x) := interp(c1, n, y, x)
δ := integral((g(x) - fit(x))^2, x = 0 .. L)
δ1 := integral((g(x) - fit1(x))^2, x = 0 .. L)
δ = 1.78873
δ1 = 1.91054
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N1 := 15
n :=
    for k ∈ 0 .. N1
        n[k] ← L/N1*k
    return n
y := g(n)
n = [0; 0.266667; 0.533333; 0.8; 1.06667; 1.33333; 1.6; 1.86667; 2.13333; 2.4; 2.66667; 2.93333; 3.2; 3.46667; 3.73333; 4]
y = [1; 1.00487; 1.06727; 1.22841; 1.17355; 0.240708; -0.276301; 1.08867; 0.0143445; 0.557715; 1.53605; 1.52919; 0.746789; -0.409596; 0.763969; 0.474746]
c = [0; 3; 1; -4.7503; -4.7503; 7.50352; -3.33823; -0.196951; -0.196951]
c1 = [0; 3; 2; -12.34; -2.708; 6.924; -3.06246; -0.720497; 1.62147]
c := pspline(n, y)
c1 := cspline(n, y)
fit(x) := interp(c, n, y, x)
fit1(x) := interp(c1, n, y, x)
δ2 := integral((g(x) - fit(x))^2, x = 0 .. L)
δ3 := integral((g(x) - fit1(x))^2, x = 0 .. L)
δ2 = 2.11649
δ3 = 2.15598
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N2 := 1000
n :=
    for k ∈ 0 .. N2
        n[k] ← L/N2*k
    return n
y := g(n)
n =  # no stored result
y =  # no stored result
c = [0; 3; 1; 0.551841; 0.551841; 2.09473; -0.598945; -17.9245; -1.78241; 60.1398; -79.9848; 53.9843; 0.54036; -19.4454; -5.88469; -22.4521; 64.1385; -37.5123; -37.5123]
c1 = [0; 3; 2; -0.407849; 0.808988; 2.02583; -0.580491; -17.9294; -1.78121; 60.1399; -79.9864; 53.9906; 0.516966; -19.3581; -6.21061; -21.2358; 59.5989; -20.5705; -100.74]
c := pspline(n, y)
c1 := cspline(n, y)
fit(x) := interp(c, n, y, x)
fit1(x) := interp(c1, n, y, x)
δ5 := integral((g(x) - fit(x))^2, x = 0 .. L)
δ6 := integral((g(x) - fit1(x))^2, x = 0 .. L)
δ5 = 9.50815e-12
δ6 = 8.92963e-13
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