z(x, y) := if(8 - 3*x^2 - 4*y^2 < 0, 0, sqrt(8 - 3*x^2 - 4*y^2))
a := -4
N := 10
g3(x, y) := (cos(x)^2 + sin(y)^3)/2
b := 4
stepX := (b - a)/N
c := -4
z2(x, y) := if(8 - 3*x^2 - 4*y^2 < 0, 0, -sqrt(8 - 3*x^2 - 4*y^2))
d := 4
stepY := (d - c)/N
x := a .. b
# [component: inputs z, z2]
i := 0 .. N
y := c .. d
j := 0 .. N
Mxy[j, 0] := a + stepX*j
Mxy[i, 1] := c + stepY*i
Mz[i, j] := g3(Mxy[j, 0], Mxy[i, 1])
VS := cspline(Mxy, Mz)
g3i(x, y) := interp(VS, Mxy, Mz, [x; y])
# [component: inputs g3]
# [component: inputs g3i]
δ := integral(integral((g3(x, y) - g3i(x, y))^2, x = -4 .. 4), y = -4 .. 4)
δ = 11.7843
