a := 2
L := 10
98.39
0.029
# 134.764 | 0.03 | 3.244*10^-3
b := 4
N := 15
step := L/N
5.461
50
2
mean(0.029, 0.03, 3, 244*10^-3) = 0.82575
mean(98.39, 134.764, 5.461) = 79.5383
n := 0 .. N
r := 2
# 8.902 | 0.847
f(x) := a*x + b
X[n] := step*n
0.928
0.184
# 1.629 | 0.528
Y[n] := f(X[n])*(1 + rnd(r) - 0.5*r)
mean(8.902, 0.928, 1.629) = 3.81967
mean(0.847, 0.184, 0.528) = 0.519667
R := line(X, Y)
R1 := medfit(X, Y)
δ3 := [0.826; 3.82; 0.52; 79.538]
R1 = [-1.21758; 2.78171]
R = [0.997385; 2.46606]
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YR(x) := R[1]*x + R[0]
YR1(x) := R1[1]*x + R1[0]
r3 := [2; 6; 20; 50]
A := integral(f(x)^2, x = 0 .. L)
A = 2293.33
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δ2 := integral((f(x) - YR1(x))^2, x = 0 .. L)/A
δ1 := integral((f(x) - YR(x))^2, x = 0 .. L)/A
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δ1 = 0.00986384
δ2 = 0.0296766
# 0.014 | 0.736 | 0.813 | 2.179
# 8.857*10^-3 | 0.571 | 5.567 | 53.904
# 0.021 | 0.402
0.037
22.099
mean(0.813, 5.567, 0.402) = 2.26067
mean(0.014, 8.857*10^-3, 0.021) = 0.014619
20
mean(2.179, 59.904, 22.099) = 28.0607
2
mean(0.736, 0.571, 0.037) = 0.448
50
6
δ := [0.015; 0.448; 2.261; 28.061]
r1 := [2; 6; 20; 50]
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