f7(x) := 3*sin(x)^2 - 3.2 + (3^(0.5*x) + 1)/(x + 1)
N := 15
L := 10
n := 0 .. N
step := L/N
X[n] := step*n
Y[n] := f7(X[n])
f71(x) := interp(pspline(X, Y), X, Y, x)
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v := regress(X, Y, 3)
R(x) := interp(v, X, Y, x)
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δ1 := integral((f71(x) - R(x))^2, x = 0 .. L)/integral(f71(x)^2, x = 0 .. L)
δ1 = 0.0242538
vg := [2; 1; 4]
w := expfit(X, Y, vg)
w = [0.218384; 0.454057; -0.882209]
f8(x) := w[0]*e^(w[1]*x) + w[2]
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δ2 := integral((f71(x) - f8(x))^2, x = 0 .. L)/integral(f71(x)^2, x = 0 .. L)
δ2 = 0.0259027
r := 1
f9(x) := (1 + rnd(r) + 0.5*r)*(sin(x)^2 - 3.2 + (3^(0.5*x) + 1)/(x + 1))
N1 := 15
L1 := 10
n := 0 .. N
step1 := L/N
X1[n] := step1*n
Y1[n] := f9(X[n])
f91(x) := interp(pspline(X1, Y1), X1, Y1, x)
v1 := regress(X1, Y1, 3)
R1(x) := interp(v1, X1, Y1, x)
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δ11 := integral((f91(x) - R1(x))^2, x = 0 .. L)/integral(f91(x)^2, x = 0 .. L)
δ11 = 0.0202207
vg1 := [5; 3; 9]
w1 := expfit(X1, Y1, vg1)
w1 = [0.143051; 0.583423; -2.57475]
f10(x) := w1[0]*e^(w1[1]*x) + w1[2]
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A := [0.024; 0.026; 0.02; 0.012]
δ21 := integral((f91(x) - f10(x))^2, x = 0 .. L)/integral(f91(x)^2, x = 0 .. L)
r1 := [0; 1; 2; 3]
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δ21 = 0.011546
