T := 9
u(t) := 10*(1*(17*exp(0.1*t*sin(1.8*t)*t^0.95) - 17)/(t^4 + 7)) - 2*t^0.1
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k := 0 .. 15
a[0] := 0
f[k] := k/T
a[k] := 2/T*integral(u(t)*cos(2*π*t*f[k]), t = 0 .. T)
b[k] := 2/T*integral(u(t)*sin(2*π*t*f[k]), t = 0 .. T)
m := 0.1*2.518
A[k] := sqrt(a[k]^2 + b[k]^2)
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f := 11/T
Δt := 1/(2.5*f)
N1 := T/Δt
N1 = 27.5
N := 28
u(t) := 10*(1*(17*exp(0.1*t*sin(1.8*t)*t^0.95) - 17)/(t^4 + 7)) - 2*t^0.1
step := T/N
n := 0 .. N
X[n] := step*n
Y[n] := u(X[n])
v := regress(X, Y, 4)
v1 := regress(X, Y, 6)
vg := [10; 9; 8]
v = [3; 3; 4; -0.775239; 0.756425; -1.0794; 0.253735; -0.015977]
v1 = [3; 3; 6; -1.15385; 7.39612; -11.8005; 6.06947; -1.38985; 0.146378; -0.00576455]
[A; B; C] := sinfit(X, Y, vg)
[A; B; C] = [0.978333; -263.511; -1.44073]
F(t) := A*sin(t + B) + C
δ2 := integral((u(t) - F(t))^2, t = 0 .. T)
δ3 := integral((u(t) - F(t))^2, t = 0 .. T)/integral(u(t)^2, t = 0 .. T)
δ1 := integral(u(t)^2, t = 0 .. T)
δ1 = 71.2708
δ2 = 53.1266
δ3 = 0.74542  # третий способ δ3 является точной для апроксимации
r1 := [0; 1; 2]
P := [71.271; 53.127; 0.745]
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