f(x) :=
    (3*sin(3*π*x)) if 0 ≤ x < 3
    sqrt(x - 3) if 3 ≤ x < 7
    (2 + ((x^2 - 49)/(x + 1))) if 7 ≤ x ≤ 12
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f133(x) := if(0 ≤ x < 3, 3*sin(3*π*x), if(3 ≤ x < 7, sqrt(x - 3), if(7 ≤ x ≤ 12, 2 + (x^2 - 49)/(x + 1)*1, 1)))
Δx := 0.25
N := 12/Δx
n := 0 .. N
X[n] := Δx*n
Y[n] := f(X[n])
v := regress(X, Y, 20)
span4 := 0.65
span6 := 1.9
span2 := 0.25
span3 := 0.5
span5 := 0.75
span1 := 0.15
s4 := loess(X, Y, span4)
s6 := loess(X, Y, span6)
s2 := loess(X, Y, span2)
s3 := loess(X, Y, span3)
s5 := loess(X, Y, span5)
sl := loess(X, Y, span1)
R4(x) := interp(s4, X, Y, x)
R6(x) := interp(s6, X, Y, x)
R2(x) := interp(s2, X, Y, x)
R3(x) := interp(s3, X, Y, x)
R5(x) := interp(s5, X, Y, x)
R1(x) := interp(sl, X, Y, x)
δ4 := integral((f(x) - R4(x))^2, x = 0 .. 12)/integral(f(x)^2, x = 0 .. 12)
δ6 := integral((f(x) - R6(x))^2, x = 0 .. 12)/integral(f(x)^2, x = 0 .. 12)
δ2 := integral((f(x) - R2(x))^2, x = 0 .. 12)/integral(f(x)^2, x = 0 .. 12)
δ3 := integral((f(x) - R3(x))^2, x = 0 .. 12)/integral(f(x)^2, x = 0 .. 12)
δ5 := integral((f(x) - R5(x))^2, x = 0 .. 12)/integral(f(x)^2, x = 0 .. 12)
δ1 := integral((f(x) - R1(x))^2, x = 0 .. 12)/integral(f(x)^2, x = 0 .. 12)
δ4 = 0.0625247
δ6 = 0.0652245
δ2 = 0.0607397
δ3 = 0.061538
δ5 = 0.0635745
δ1 = 0.0561497
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span := [0.15; 0.25; 0.5; 0.65; 0.75; 1.9]
δl := [0.056; 0.061; 0.062; 0.063; 0.064; 0.065]
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