n := 0 .. 12
Y(x) := interp(regress(X3, Y3, 2), X3, Y3, x)  # error: This variable is undefined.
N := 20
X3[n] := n
Y3[n] := rnd(13) - 3
YI(x) := interp(pspline(X3, Y3), X3, Y3, x)
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Y(n) =  # error: This variable is undefined.
f11(x) := -0.065*x^3 + 1.169*x^2 - 5.343*x + 6.042
f1(x) := 6*cos(x)
f2(x) := 2*sin(x) + 2
f12(x) := 5.665*e^(-0.369*x)
f3(x) := sin(x) + x
f13(x) := 1.289*ln(x) + 2.474
F1(x) := f11(x) + f12(x) + f13(x)
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F(x) := [f1(x); f2(x); f3(x)]
T := 12
step := T/N
n := 0 .. N
X[n] := step*n
Y[n] := YI(X[n])
s := linfit(X, Y, F)
