1
T := 10
u(t) := 10*sin(2*π*t/T)*sin(10*π*t/T)
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2
N := 30
n := 0 .. N
X[n] := (T*n)/N
Y[n] := u(X[n]) + rnd(8) - 4
3
un0(x) := interp(pspline(X, Y), X, Y, x)
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δ0 := integral((u(x) - un0(x))^2, x = 0 .. 10)/integral(u(x)^2, x = 0 .. 10)
δ0*100 = 21.8614
4
Y1[n] := u(X[n]) + rnd(8) - 4
Y2[n] := u(X[n]) + rnd(8) - 4
Y3[n] := u(X[n]) + rnd(8) - 4
Y4[n] := u(X[n]) + rnd(8) - 4
Y5[n] := u(X[n]) + rnd(8) - 4
un1(x) := interp(pspline(X, Y1), X, Y1, x)
un2(x) := interp(pspline(X, Y2), X, Y2, x)
un3(x) := interp(pspline(X, Y3), X, Y3, x)
un4(x) := interp(pspline(X, Y4), X, Y4, x)
un5(x) := interp(pspline(X, Y5), X, Y5, x)
δ1 := integral((u(x) - un1(x))^2, x = 0 .. 10)/integral(u(x)^2, x = 0 .. 10)
δ2 := integral((u(x) - un2(x))^2, x = 0 .. 10)/integral(u(x)^2, x = 0 .. 10)
δ3 := integral((u(x) - un3(x))^2, x = 0 .. 10)/integral(u(x)^2, x = 0 .. 10)
δ4 := integral((u(x) - un4(x))^2, x = 0 .. 10)/integral(u(x)^2, x = 0 .. 10)
δ5 := integral((u(x) - un5(x))^2, x = 0 .. 10)/integral(u(x)^2, x = 0 .. 10)
δ1*100 = 23.7268
δ2*100 = 20.6371
δ3*100 = 19.0391
δ4*100 = 11.9435
δ5*100 = 14.2794
5
us3(t) := 1/3*(un1(t) + un2(t) + un0(t))
us2(t) := 1/2*(un1(t) + un0(t))
δ33 := integral((u(x) - us3(x))^2, x = 0 .. 10)/integral(u(x)^2, x = 0 .. 10)
δ22 := integral((u(x) - us2(x))^2, x = 0 .. 10)/integral(u(x)^2, x = 0 .. 10)
δ33 = 0.0618486
δ22 = 0.124097
us5(t) := 1/5*(un1(t) + un2(t) + un0(t) + un3(t) + un4(t))
us4(t) := 1/4*(un1(t) + un2(t) + un0(t) + un3(t))
δ55 := integral((u(x) - us5(x))^2, x = 0 .. 10)/integral(u(x)^2, x = 0 .. 10)
δ44 := integral((u(x) - us4(x))^2, x = 0 .. 10)/integral(u(x)^2, x = 0 .. 10)
δ55 = 0.0194317
δ44 = 0.0319294
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r1 := [2; 3; 4; 5]
δδ := [0.124; 0.062; 0.032; 0.019]
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