ORIGIN := 1
α := 0.18
ε := [5; 3]
M := 500
t0 := 0
γ := [4; 1]
t1 := 15
y := -(α*ε[2] - γ[2]*ε[1])/(α^2 + γ[1]*γ[2])
x := (α*ε[1] + γ[1]*ε[2])/(α^2 + γ[1]*γ[2])
x = 3.19909
y = 1.10604
F(t, N) := [(ε[1] - γ[1]*N[2])*N[1] - α*(N[1]^2); (-ε[2] + γ[2]*N[1])*N[2] - α*(N[2]^2)]
D1 := rkfixed([8; 1], t0, t1, M, F)
D2 := rkfixed([6; 4], t0, t1, M, F)
D3 := rkfixed([2; 2], t0, t1, M, F)
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# [component: inputs (D1[:, 1], D1[:, 2], D1[:, 3])]
α := 0.1
ε := [4; 2]
γ := [2.5; 1]
N1 := (α*ε[1] + γ[1]*ε[2])/(α^2 + γ[1]*γ[2])
N2 := -(α*ε[2] - γ[2]*ε[1])/(α^2 + γ[1]*γ[2])
N1 = 2.15139
N2 = 1.51394
f1(x, y) := ε[1]*x - γ[1]*x*y - α*x^2
f1(x, y), series, x, y, 2 → 2.92712846989, series, 3.19908739212, 1.10604106735, 2
f2(x, y) := -ε[2]*y + γ[2]*x*y - α*y^2
f2(x, y)*series, x, y, 2 → 1.20390721477*series, 3.19908739212, 1.10604106735, 2
t3 := 10
M1 := 500
t2 := 0
F1(t, N) := [(ε[1] - γ[1]*N[2])*N[1] - α*N[1]^2; (-ε[2] + γ[2]*N[1])*N[2] - α*N[2]^2]
D11 := rkfixed([3; 1], t2, t3, M1, F1)
D21 := rkfixed([1; 4], t2, t3, M1, F1)
D31 := rkfixed([2; 2], t2, t3, M1, F1)
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# [component: inputs (D11[:, 1], D11[:, 2], D11[:, 3])]
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ORIGIN = 1
r := 1
J := 1/2
K := 7
D := 1
w := 1.7
s := 0.2
N0 := [3; 1]
F(t, N) := [r*(1 - N[1]/K)*N[1] - w*N[1]*N[2]/(D + N[1]); s*(1 - J*N[2]/N[1])*N[2]]
N := rkfixed(N0, 0, 100, 500, F)
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