ORIGIN := 1
a := 2
M := 500
b := 1
c := 0.4
t0 := 0
d := 0.2
t1 := 20
N10 := c/d
F(t, XY) := [a*XY[1] - b*XY[1]*XY[2]; d*XY[1]*XY[2] - c*XY[2]]
N20 := a/b
D1 := rkfixed([2; 1], t0, t1, M, F)
N10 = 2
D2 := rkfixed([3; 1], t0, t1, M, F)
N20 = 2
D3 := rkfixed([4; 1], t0, t1, M, F)
D4 := rkfixed([3; 2], t0, t1, M, F)
D5 := rkfixed([1; 3], t0, t1, M, F)
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D1[:, 1] = [
    0; 0.04; 0.08; 0.12; 0.16; 0.2; 0.24; 0.28; 0.32; 0.36
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]
D1[:, 2] = [
    2; 2.08161; 2.1665; 2.25473; 2.34635; 2.44143; 2.54; 2.64209; 2.7477; 2.85684
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]
D1[:, 3] = [
    1; 1.00032; 1.00132; 1.003; 1.00541; 1.00858; 1.01255; 1.01735; 1.02302; 1.0296
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]
# [component: inputs (D1[:, 1], D1[:, 2], D1[:, 3])]
