ORIGIN := 1
M := 10000
t0 := 0
r := 0.01
t1 := 1000
q := 1.2
FF(t, n) := [r*n[1]*(1 - n[1]/n[2]); (q*n[1]/(n[1]*(q - 1) + 1)) - n[1]]
D1 := rkfixed([0.3; 0.5], t0, t1, M, FF)
D2 := rkfixed([1.45; 1.4], t0, t1, M, FF)
D3 := rkfixed([0.32; 0.445], t0, t1, M, FF)
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# [component: inputs (D1[:, 1], D1[:, 2], D1[:, 3])]
