ORIGIN := 1
μ := 0.035
M := 2000
t0 := 0
t1 := 100
t11 := 70
t12 := 50
FF(t, y) := [y[2]; 2*μ*(1 - y[1]^2)*y[2] - y[1]]
D1 := rkfixed([0; 1], t0, t1, M, FF)
D2 := rkfixed([0; 2], t0, t11, M, FF)
D3 := rkfixed([0; 0.2], t0, t12, M, FF)
# [component: inputs (D1[:, 1], D1[:, 2], D1[:, 3])]
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V := [0, 0, 2.5, 1.5, 0.5, 1, 1, 1, 0.1, 0.5; 0.5, 1.5, 0, 0, 1, 0, 1, 2, 0.1, 0.2]
A := 1
B1 := A^2 + 1.1
B := [A^2 + 1.5; 0.5; A + 3.11]
DD(t, x) := [-(B[2] + 1)*x[1] + x[1]^2*x[2] + A; B[2]*x[1] - x[1]^2*x[2]]
t00 := 0
t01 := 50
M1 := 500
k := 1 .. 10
Z[k] := rkfixed(V[:, k], t00, t01, M1, DD)
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# [component: inputs (Z[1][:, 1], Z[1][:, 2], Z[1][:, 3])]
J := 0.18
D := 1.3
w := 0.2
s := 0.1
K := 7
r := 1
M00 := 2000
t000 := 0
t100 := 100
DDD(t, n) := [r*(1 - n[1]/K)*n[1] - w*n[1]*n[2]/(D + n[1]); (s*(1 - J*n[2]/n[1]))*n[2]]
D11 := rkfixed([4; 1], t000, t100, M00, DDD)
D21 := rkfixed([5; 4], t000, t100, M00, DDD)
D31 := rkfixed([1; 3], t000, t100, M00, DDD)
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# [component: inputs (D11[:, 1], D21[:, 2], D31[:, 3])]
