ORIGIN := 1
μ := 0.035
M := 1000
t0 := 0
t1 := 100
t11 := 70
t12 := 50
FF(t, y) := [y[2]; (-y)[1] - μ*(y[1]^2 - 1)*y[2]]
D1 := rkfixed([0; 1], t0, t1, M, FF)
D2 := rkfixed([1; 2], t0, t11, M, FF)
D3 := rkfixed([0.5; 0.3], t0, t12, M, FF)
# [component: inputs (D1[:, 1], D1[:, 2], D1[:, 3])]
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