x1 := 0.5
x2 := 1
d := 1.8
M := 50
N := 3000
b := 1.5  # Алгоритм Ричардсона
i := 0 .. N + 1
x[i] := (x2 - x1)/N*i
f[i] := sum((1 - cos(b^k*x[i]))/b^((2 - d)*k), k = -M .. M)
L :=
    Δ ← 1900
    for j ∈ 1 .. Δ
        m ← trunc(N/j)
        Δx[j] ← (x2 - x1)/N*j
        r ← sqrt((f[N] - f[m*j])^2 + (x[N] - x[m*j])^2)
        L[j] ← sum(sqrt((f[n*j] - f[(n - 1)*j])^2 + Δx[j]^2) + r, n = 1 .. m)
        Λ[j] ← ln(L[j])
        ΔX[j] ← ln(Δx[j])
    [ΔX; Λ]
y(xx) := line(L[0], L[1])[0] + line(L[0], L[1])[1]*xx
tgα := line(L[0], L[1])[1]
tgα = -0.575125
D := 1 - tgα
D = 1.57513
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# Сеточный алгоритм
x1 := 0.5
x2 := 1
b := 1.5
d := 1.8
K := 50
n := 20 .. 200
eps(n) := (x2 - x1)/n
f(x) := sum((1 - cos(b^k*x))/b^((2 - d)*k), k = -K .. K)
N[n] :=
    m ← 100
    M ← 100
    for i ∈ 0 .. n - 1
        for k ∈ 0 .. M
            xx[i] ← x1 + eps(n)*i
            xx[i + 1] ← x1 + eps(n)*(i + 1)
            del ← (xx[i + 1] - xx[i])/M
            d[k] ← f(xx[i] + del*k)
        d
        A ← (max(d) - min(d))/eps(n)
        m ← m + ceil(A)
    m
# кривая
# Вейерштрасса-Мандельброта
D1 := (ln(N[200]) - ln(N[20]))/(-ln(eps(200)) + ln(eps(20)))
D1 = 1.7738
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# Число шагов
N := 600  # Стандартное отклонение
# Начальная точка
x[0] := 0
σ := 1
y[0] := 0
i := 1 .. N
[x[i]; y[i]] := [x[i - 1]; y[i - 1]] + rnorm(2, 0, σ)
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# Число шагов
N := 10000  # Стандартное отклонение
# Начальная точка
x[0] := 0
σ := 1
y[0] := 0
j := 1 .. N
[x[j]; y[j]] := [x[j - 1]; y[j - 1]] + rnorm(2, 0, σ)
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N := 10000
x[0] := 0
σ := 1
y[0] := 0
j := 1 .. N
[x[j]; y[j]] := [x[j - 1]; y[j - 1]] + rnorm(2, 0, σ)
L :=
    Δ ← 1900
    for j ∈ 1 .. Δ
        m ← trunc(N/j)
        Δx[j] ← (x2 - x1)/N*j
        r ← sqrt((y[N] - y[m*j])^2 + (x[N] - x[m*j])^2)
        L[j] ← sum(sqrt((y[n*j] - y[(n - 1)*j])^2 + Δx[j]^2) + r, n = 1 .. m)
        Λ[j] ← ln(L[j])
        ΔX[j] ← ln(Δx[j])
    [ΔX; Λ]
y(xx) := line(L[0], L[1])[0] + line(L[0], L[1])[1]*xx
tgα := line(L[0], L[1])[1]
tgα = -0.36383
D := 1 - tgα
D = 1.36383
k := line(L[0], L[1])[1]
b := line(L[0], L[1])[0]
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x1 := 0.5
x2 := 1
b := 1.5
d := 1.8
K := 50
n := 30 .. 200
f(x) := sum((1 - cos(b^k*x))/b^((2 - d)*k), k = -K .. K)
eps(n) := (x2 - x1)/n
N[n] :=
    m ← 100
    M ← 100
    for i ∈ 0 .. n - 1
        for k ∈ 0 .. M
            xx[i] ← x1 + eps(n)*i
            xx[i + 1] ← x1 + eps(n)*(i + 1)
            del ← (xx[i + 1] - xx[i])/M
            d[k] ← f(xx[i] + del*k)
        d
        A ← (max(d) - min(d))/eps(n)
        m ← m + ceil(A)
    m
# кривая
# Вейерштрасса-Мандельброта
D1 := (ln(N[200]) - ln(N[30]))/(-ln(eps(200)) + ln(eps(20)))
D1 = 1.45924
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